<neuroml xmlns="http://www.neuroml.org/schema/neuroml2"  xmlns:xs="http://www.w3.org/2001/XMLSchema" xmlns:xsi="http://www.w3.org/2001/XMLSchema-instance" xsi:schemaLocation="http://www.neuroml.org/schema/neuroml2 https://raw.github.com/NeuroML/NeuroML2/development/Schemas/NeuroML2/NeuroML_v2.3.1.xsd" id="Golgi_cell_network">
    <annotation>

            <rdf:RDF
              xmlns:dcterms="http://purl.org/dc/terms/"
              xmlns:orcid="https://orcid.org/"
              xmlns:prism="http://prismstandard.org/namespaces/basic/2.0/"
              xmlns:dc="http://purl.org/dc/elements/1.1/"
              xmlns:bqbiol="http://biomodels.net/biology-qualifiers/"
              xmlns:rdf="http://www.w3.org/1999/02/22-rdf-syntax-ns#"
              xmlns:foaf="http://xmlns.com/foaf/0.1/"
            >
              <rdf:Description rdf:about="Golgi_cell_network">
                <dc:title>Cerebellar Golgi Cell network model</dc:title>
                <dcterms:abstract>Cerebellar Golgi Cell network model</dcterms:abstract>
                <prism:keyword>
                  <rdf:Bag>
                    <rdf:li>Golgi cell</rdf:li>
                    <rdf:li>Cerebellum</rdf:li>
                  </rdf:Bag>
                </prism:keyword>
                <bqbiol:isVersionOf>
                  <rdf:Bag>
                    <rdf:li rdf:resource="https://github.com/harshagurnani/GoC_Network_Sim_BehInputs"/>
                  </rdf:Bag>
                </bqbiol:isVersionOf>
                <dc:source>
                  <rdf:Bag>
                    <rdf:li rdf:resource="https://github.com/sanjayankur31/GolgiCellNetwork/"/>
                  </rdf:Bag>
                </dc:source>
                <dcterms:references>
                  <rdf:Bag>
                    <rdf:li rdf:resource="https://doi.org/10.1016/j.neuron.2021.03.027"/>
                    <rdf:li rdf:resource="https://doi.org/10.1016/j.neuron.2010.06.028"/>
                  </rdf:Bag>
                </dcterms:references>
                <dc:creator>
                  <rdf:Bag>
                    <rdf:li rdf:resource="#Ankur_Sinha"/>
                  </rdf:Bag>
                </dc:creator>
                <dcterms:created>
                  <rdf:Description>
                    <dcterms:W3CDTF>2025-06-21</dcterms:W3CDTF>
                  </rdf:Description>
                </dcterms:created>
              </rdf:Description>
              <rdf:Description rdf:about="#Ankur_Sinha">
                <foaf:name>Ankur Sinha</foaf:name>
                <dc:identifier>ankur.sinha@ucl.ac.uk</dc:identifier>
                <orcid:id rdf:resource="https://orcid.org/0000-0001-7568-7167"/>
              </rdf:Description>
            </rdf:RDF>

    </annotation>
    <include href="./cells/Golgi/GoC_00659.cell.nml"/>
    <include href="./cells/Golgi/GoC_00856.cell.nml"/>
    <include href="./cells/Golgi/GoC_00263.cell.nml"/>
    <include href="./cells/Golgi/GoC_00514.cell.nml"/>
    <include href="./cells/Golgi/GoC_00177.cell.nml"/>
    <gapJunction id="Gap_junction" conductance="426pS"/>
    <network id="Golgi_cell_network">
        <population id="pop_GoC_00659" component="GoC_00659" type="populationList">
            <instance id="0">
                <location x="92.143541906906819" y="23.677639400757567" z="67.488094358233013"/>
            </instance>
            <instance id="1">
                <location x="297.312389967224419" y="266.655081499375285" z="4.332406269480349"/>
            </instance>
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        </population>
        <population id="pop_GoC_00856" component="GoC_00856" type="populationList">
            <instance id="0">
                <location x="162.853707212673612" y="96.809345076888604" z="45.781164889742755"/>
            </instance>
            <instance id="1">
                <location x="460.201285546543886" y="439.534580757337892" z="25.261575504653024"/>
            </instance>
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        </population>
        <population id="pop_GoC_00263" component="GoC_00263" type="populationList">
            <instance id="0">
                <location x="350.677689618346506" y="311.38829330159956" z="49.368264574711205"/>
            </instance>
            <instance id="1">
                <location x="420.268850059244357" y="356.048493471823633" z="44.390898141585247"/>
            </instance>
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        </population>
        <population id="pop_GoC_00514" component="GoC_00514" type="populationList">
            <instance id="0">
                <location x="11.34023806239165" y="427.527343065828347" z="30.633720286627241"/>
            </instance>
            <instance id="1">
                <location x="379.391722376952089" y="281.637555069933057" z="3.816418217864814"/>
            </instance>
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        </population>
        <population id="pop_GoC_00177" component="GoC_00177" type="populationList">
            <instance id="0">
                <location x="386.61935744660525" y="440.171790638602204" z="63.739144695740521"/>
            </instance>
            <instance id="1">
                <location x="426.301120127276533" y="298.977685762213525" z="69.38466603020629"/>
            </instance>
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        </population>
        <electricalProjection id="GJ_0_1" presynapticPopulation="pop_GoC_00659" postsynapticPopulation="pop_GoC_00856">
            <electricalConnectionInstanceW id="22" preCell="../pop_GoC_00659/0/GoC_00659" preSegment="3" postCell="../pop_GoC_00856/0/GoC_00856" synapse="Gap_junction" weight="0.265450170849363"/>
            <electricalConnectionInstanceW id="24" preCell="../pop_GoC_00659/0/GoC_00659" postCell="../pop_GoC_00856/2/GoC_00856" synapse="Gap_junction" weight="0.237198674931982"/>
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        </electricalProjection>
        <electricalProjection id="GJ_0_2" presynapticPopulation="pop_GoC_00659" postsynapticPopulation="pop_GoC_00263">
            <electricalConnectionInstanceW id="49" preCell="../pop_GoC_00659/0/GoC_00659" postCell="../pop_GoC_00263/4/GoC_00263" postSegment="2" synapse="Gap_junction" weight="0.628790229877489"/>
            <electricalConnectionInstanceW id="55" preCell="../pop_GoC_00659/0/GoC_00659" preSegment="1" postCell="../pop_GoC_00263/10/GoC_00263" synapse="Gap_junction" weight="0.500378285329621"/>
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        </electricalProjection>
        <electricalProjection id="GJ_0_3" presynapticPopulation="pop_GoC_00659" postsynapticPopulation="pop_GoC_00514">
            <electricalConnectionInstanceW id="76" preCell="../pop_GoC_00659/0/GoC_00659" preSegment="3" postCell="../pop_GoC_00514/8/GoC_00514" postSegment="1" synapse="Gap_junction" weight="0.252983418561422"/>
            <electricalConnectionInstanceW id="89" preCell="../pop_GoC_00659/0/GoC_00659" postCell="../pop_GoC_00514/21/GoC_00514" postSegment="1" synapse="Gap_junction" weight="0.948433373000871"/>
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        </electricalProjection>
        <electricalProjection id="GJ_0_4" presynapticPopulation="pop_GoC_00659" postsynapticPopulation="pop_GoC_00177">
            <electricalConnectionInstanceW id="106" preCell="../pop_GoC_00659/0/GoC_00659" preSegment="3" postCell="../pop_GoC_00177/15/GoC_00177" postSegment="1" synapse="Gap_junction" weight="0.359007516707421"/>
            <electricalConnectionInstanceW id="224" preCell="../pop_GoC_00659/1/GoC_00659" preSegment="2" postCell="../pop_GoC_00177/20/GoC_00177" synapse="Gap_junction" weight="0.360406335473362"/>
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        </electricalProjection>
        <electricalProjection id="GJ_0_0" presynapticPopulation="pop_GoC_00659" postsynapticPopulation="pop_GoC_00659">
            <electricalConnectionInstanceW id="126" preCell="../pop_GoC_00659/1/GoC_00659" postCell="../pop_GoC_00659/14/GoC_00659" postSegment="3" synapse="Gap_junction" weight="0.38825602383374"/>
            <electricalConnectionInstanceW id="130" preCell="../pop_GoC_00659/1/GoC_00659" postCell="../pop_GoC_00659/18/GoC_00659" synapse="Gap_junction" weight="0.371186458805439"/>
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        </electricalProjection>
        <electricalProjection id="GJ_1_1" presynapticPopulation="pop_GoC_00856" postsynapticPopulation="pop_GoC_00856">
            <electricalConnectionInstanceW id="2370" preCell="../pop_GoC_00856/0/GoC_00856" preSegment="1" postCell="../pop_GoC_00856/2/GoC_00856" postSegment="1" synapse="Gap_junction" weight="1.161662499804758"/>
            <electricalConnectionInstanceW id="2376" preCell="../pop_GoC_00856/0/GoC_00856" preSegment="3" postCell="../pop_GoC_00856/8/GoC_00856" synapse="Gap_junction" weight="0.30781830172427"/>
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        </electricalProjection>
        <electricalProjection id="GJ_1_2" presynapticPopulation="pop_GoC_00856" postsynapticPopulation="pop_GoC_00263">
            <electricalConnectionInstanceW id="2411" preCell="../pop_GoC_00856/0/GoC_00856" preSegment="1" postCell="../pop_GoC_00263/20/GoC_00263" postSegment="2" synapse="Gap_junction" weight="0.196423808449689"/>
            <electricalConnectionInstanceW id="2413" preCell="../pop_GoC_00856/0/GoC_00856" preSegment="1" postCell="../pop_GoC_00263/22/GoC_00263" postSegment="3" synapse="Gap_junction" weight="0.594667276300302"/>
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        </electricalProjection>
        <electricalProjection id="GJ_1_3" presynapticPopulation="pop_GoC_00856" postsynapticPopulation="pop_GoC_00514">
            <electricalConnectionInstanceW id="2422" preCell="../pop_GoC_00856/0/GoC_00856" preSegment="2" postCell="../pop_GoC_00514/8/GoC_00514" synapse="Gap_junction" weight="0.381538947068625"/>
            <electricalConnectionInstanceW id="2431" preCell="../pop_GoC_00856/0/GoC_00856" preSegment="2" postCell="../pop_GoC_00514/17/GoC_00514" postSegment="2" synapse="Gap_junction" weight="0.153905894722832"/>
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        </electricalProjection>
        <electricalProjection id="GJ_1_4" presynapticPopulation="pop_GoC_00856" postsynapticPopulation="pop_GoC_00177">
            <electricalConnectionInstanceW id="2452" preCell="../pop_GoC_00856/0/GoC_00856" preSegment="3" postCell="../pop_GoC_00177/15/GoC_00177" synapse="Gap_junction" weight="0.368508508292824"/>
            <electricalConnectionInstanceW id="2456" preCell="../pop_GoC_00856/0/GoC_00856" preSegment="3" postCell="../pop_GoC_00177/19/GoC_00177" postSegment="1" synapse="Gap_junction" weight="0.546582660633891"/>
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        </electricalProjection>
        <electricalProjection id="GJ_2_2" presynapticPopulation="pop_GoC_00263" postsynapticPopulation="pop_GoC_00263">
            <electricalConnectionInstanceW id="4209" preCell="../pop_GoC_00263/0/GoC_00263" postCell="../pop_GoC_00263/1/GoC_00263" postSegment="3" synapse="Gap_junction" weight="0.444184078186629"/>
            <electricalConnectionInstanceW id="4219" preCell="../pop_GoC_00263/0/GoC_00263" postCell="../pop_GoC_00263/11/GoC_00263" postSegment="3" synapse="Gap_junction" weight="0.300968088040156"/>
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        </electricalProjection>
        <electricalProjection id="GJ_2_3" presynapticPopulation="pop_GoC_00263" postsynapticPopulation="pop_GoC_00514">
            <electricalConnectionInstanceW id="4232" preCell="../pop_GoC_00263/0/GoC_00263" postCell="../pop_GoC_00514/1/GoC_00514" postSegment="1" synapse="Gap_junction" weight="0.758131194657351"/>
            <electricalConnectionInstanceW id="4233" preCell="../pop_GoC_00263/0/GoC_00263" postCell="../pop_GoC_00514/2/GoC_00514" postSegment="2" synapse="Gap_junction" weight="0.514656708379049"/>
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        </electricalProjection>
        <electricalProjection id="GJ_2_4" presynapticPopulation="pop_GoC_00263" postsynapticPopulation="pop_GoC_00177">
            <electricalConnectionInstanceW id="4255" preCell="../pop_GoC_00263/0/GoC_00263" postCell="../pop_GoC_00177/1/GoC_00177" synapse="Gap_junction" weight="0.485421169569903"/>
            <electricalConnectionInstanceW id="4274" preCell="../pop_GoC_00263/0/GoC_00263" preSegment="1" postCell="../pop_GoC_00177/20/GoC_00177" postSegment="2" synapse="Gap_junction" weight="2.132509311106955"/>
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        </electricalProjection>
        <electricalProjection id="GJ_3_4" presynapticPopulation="pop_GoC_00514" postsynapticPopulation="pop_GoC_00177">
            <electricalConnectionInstanceW id="5556" preCell="../pop_GoC_00514/0/GoC_00514" preSegment="1" postCell="../pop_GoC_00177/14/GoC_00177" synapse="Gap_junction" weight="0.095365081118817"/>
            <electricalConnectionInstanceW id="5594" preCell="../pop_GoC_00514/1/GoC_00514" postCell="../pop_GoC_00177/8/GoC_00177" postSegment="3" synapse="Gap_junction" weight="0.154677993356945"/>
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        </electricalProjection>
        <electricalProjection id="GJ_3_3" presynapticPopulation="pop_GoC_00514" postsynapticPopulation="pop_GoC_00514">
            <electricalConnectionInstanceW id="5565" preCell="../pop_GoC_00514/1/GoC_00514" preSegment="2" postCell="../pop_GoC_00514/2/GoC_00514" postSegment="3" synapse="Gap_junction" weight="0.235976069739392"/>
            <electricalConnectionInstanceW id="5566" preCell="../pop_GoC_00514/1/GoC_00514" postCell="../pop_GoC_00514/3/GoC_00514" postSegment="3" synapse="Gap_junction" weight="0.779834032282303"/>
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        </electricalProjection>
        <electricalProjection id="GJ_4_4" presynapticPopulation="pop_GoC_00177" postsynapticPopulation="pop_GoC_00177">
            <electricalConnectionInstanceW id="6309" preCell="../pop_GoC_00177/0/GoC_00177" preSegment="3" postCell="../pop_GoC_00177/8/GoC_00177" postSegment="1" synapse="Gap_junction" weight="0.316777030716714"/>
            <electricalConnectionInstanceW id="6312" preCell="../pop_GoC_00177/0/GoC_00177" postCell="../pop_GoC_00177/11/GoC_00177" postSegment="3" synapse="Gap_junction" weight="0.940220337409514"/>
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        </electricalProjection>
    </network>
</neuroml>
